*HEADING
Analiza Automatyczna
*NODE
1, 0, 2.5, -40
2, 0, 2.5, 40
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******* E L E M E N T S *************
*ELEMENT, type=C3D4, ELSET=Volume1
17121, 3975, 3676, 3977, 1381
17122, 1381, 1682, 3977, 1680
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*ELEMENT, type=C3D4, ELSET=Volume2
29406, 3056, 3377, 8662, 8686
29407, 3016, 2870, 8759, 8810
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*ELEMENT, type=C3D4, ELSET=Volume3
39557, 5488, 5627, 5460, 9058
39558, 5488, 9046, 5627, 9058
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*ELSET,ELSET=SOLID_BODY
17121, 17122, 17123, 17124, 17125, 17126
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
*NODE
9999999, 100.0, -40.7220205710723, 0.0
*NSET, NSET=N_RP
9999999
*NSET, NSET=N_GRP_FIX
1, 2, 3, 4, 5, 6
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*NSET, NSET=N_GRP_LOAD
21, 22, 23, 24, 25, 26
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*NSET, NSET=N_SOLID_BODY
1, 2, 3, 4, 5, 6
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*MATERIAL, NAME=STEEL
*ELASTIC
210000.0, 0.3
*SOLID SECTION, ELSET=Volume1
, MATERIAL=STEEL
*RIGID BODY, NSET=N_GRP_LOAD, REF NODE=9999999
*BOUNDARY
N_GRP_FIX, 1, 6, 0.0
*STEP
*STATIC
*CLOAD
9999999, 1, -24000.0
9999999, 2, 4800.0
9999999, 3, 4800.0
9999999, 4, 2076450.9679255197
9999999, 6, 10800000.0
*NODE PRINT, NSET=N_RP, TOTALS=ONLY
U, RF
*EL PRINT, ELSET=Volume1

S
*NODE PRINT, FREQUENCY=1
U
*END STEP
